*Heading
** Job name: Job-1 Model name: Model-1
** Generated by: Abaqus/CAE 2024
*Preprint, echo=NO, model=NO, history=NO, contact=NO
**
** PARTS
**
*Part, name=Block
*Node
      1,           0.,           0.
      2,           1.,           0.
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*Element, type=CPE4I
  1,   1,   2,  43,  42
  2,   2,   3,  44,  43
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*Nset, nset=_PickedSet2, internal, generate
   1,  861,    1
*Elset, elset=_PickedSet2, internal, generate
   1,  800,    1
** Section: SolidSection
*Solid Section, elset=_PickedSet2, material=Mat-1
,
*End Part
**
*Part, name=Indenter
*Node
      1,          20.,          22.,           0.
*Nset, nset=Indenter-RefPt_, internal
1,
*End Part
**
**
** ASSEMBLY
**
*Assembly, name=Assembly
**
*Instance, name=Block-1, part=Block
*End Instance
**
*Instance, name=Indenter-1, part=Indenter
*End Instance
**
*Nset, nset=_PickedSet8, internal, instance=Block-1, generate
  1,  41,   1
*Elset, elset=_PickedSet8, internal, instance=Block-1, generate
  1,  40,   1
*Nset, nset=_PickedSet9, internal, instance=Indenter-1
 1,
*Elset, elset=_S_BLOCK_TOP_S3, internal, instance=Block-1, generate
 761,  800,    1
*Surface, type=ELEMENT, name=S_BLOCK_TOP
_S_BLOCK_TOP_S3, S3
*End Assembly
**
** MATERIALS
**
*Material, name=Mat-1
*Elastic
210000., 0.3
**
** INTERACTION PROPERTIES
**
*Surface Interaction, name=IntProp-1
1.,
*Friction
0.,
*Surface Behavior, pressure-overclosure=HARD
**
** BOUNDARY CONDITIONS
**
** Name: BC-Bottom Type: 对称/反对称/完全固定
*Boundary
_PickedSet8, ENCASTRE
**
** INTERACTIONS
**
** Interaction: Int-1
*Contact Pair, interaction=IntProp-1, type=SURFACE TO SURFACE
S_BLOCK_TOP, S_IND
** ----------------------------------------------------------------
**
** STEP: Step-1
**
*Step, name=Step-1, nlgeom=NO
*Static
0.001, 1., 1e-08, 0.01
**
** BOUNDARY CONDITIONS
**
** Name: BC-Indenter Type: 位移/转角
*Boundary
_PickedSet9, 1, 1
_PickedSet9, 2, 2, -0.02
_PickedSet9, 6, 6
**
** OUTPUT REQUESTS
**
*Restart, write, frequency=0
**
** FIELD OUTPUT: F-Output-1
**
*Output, field, variable=PRESELECT
**
** HISTORY OUTPUT: H-Output-1
**
*Output, history, variable=PRESELECT
*End Step
